! ============================================================================
!  IEEE 13-Node Test Feeder  -  OpenDSS master file
! ----------------------------------------------------------------------------
!  A small, heavily loaded, unbalanced 4.16 kV distribution feeder used as a
!  standard benchmark. It exercises almost every distribution modeling element:
!    - a substation transformer            (115 kV -> 4.16 kV)
!    - three single-phase LTC regulators   (voltage regulation)
!    - overhead + underground lines         (unbalanced, 1/2/3-phase)
!    - an in-line distribution transformer  (4.16 kV -> 0.48 kV)
!    - unbalanced spot loads (Wye & Delta, constant P, Z, and I models)
!    - shunt capacitor banks
!    - a closed switch
!
!  Run it from the OpenDSS command line or COM/Python (py-dss-interface / OpenDSSDirect)
!  with:   Redirect IEEE13Nodeckt.dss
! ============================================================================

Clear
Set DefaultBaseFrequency=60

! ---------------------------------------------------------------------------
! 1) CIRCUIT + SOURCE
!    "New Circuit.<name>" defines the Vsource (the grid) at SourceBus.
!    basekv is the source line-line kV; MVAsc3/MVAsc1 set the source stiffness
!    (short-circuit strength). Angle advances the source phase so results match
!    the published solution.
! ---------------------------------------------------------------------------
New Circuit.IEEE13Nodeckt
~ basekv=115 pu=1.0001 phases=3 bus1=SourceBus
~ Angle=30
~ MVAsc3=20000 MVASC1=21000

! ---------------------------------------------------------------------------
! 2) SUBSTATION TRANSFORMER   115 kV (delta) -> 4.16 kV (wye), node 650
! ---------------------------------------------------------------------------
New Transformer.Sub Phases=3 Windings=2 XHL=(8 1000 /)
~ wdg=1 bus=SourceBus conn=delta kv=115  kva=5000 %r=(.5 1000 /)
~ wdg=2 bus=650       conn=wye   kv=4.16 kva=5000 %r=(.5 1000 /)

! ---------------------------------------------------------------------------
! 3) LINE VOLTAGE REGULATORS  (bus 650 -> RG60)
!    Modeled as low-impedance 1-phase autotransformers, one per phase, banked
!    together. A RegControl device adjusts each tap to hold vreg (on a 120 V
!    PT base) within band, using line-drop compensation R and X.
! ---------------------------------------------------------------------------
New Transformer.Reg1 phases=1 bank=reg1 XHL=0.01 kVAs=[1666 1666]
~ Buses=[650.1 RG60.1] kVs=[2.4 2.4] %LoadLoss=0.01
New regcontrol.Reg1 transformer=Reg1 winding=2 vreg=122 band=2 ptratio=20 ctprim=700 R=3 X=9

New Transformer.Reg2 phases=1 bank=reg1 XHL=0.01 kVAs=[1666 1666]
~ Buses=[650.2 RG60.2] kVs=[2.4 2.4] %LoadLoss=0.01
New regcontrol.Reg2 transformer=Reg2 winding=2 vreg=122 band=2 ptratio=20 ctprim=700 R=3 X=9

New Transformer.Reg3 phases=1 bank=reg1 XHL=0.01 kVAs=[1666 1666]
~ Buses=[650.3 RG60.3] kVs=[2.4 2.4] %LoadLoss=0.01
New regcontrol.Reg3 transformer=Reg3 winding=2 vreg=122 band=2 ptratio=20 ctprim=700 R=3 X=9

! ---------------------------------------------------------------------------
! 4) IN-LINE DISTRIBUTION TRANSFORMER  4.16 kV -> 0.48 kV  (node 633 -> 634)
! ---------------------------------------------------------------------------
New Transformer.XFM1 Phases=3 Windings=2 XHL=2
~ wdg=1 bus=633 conn=Wye kv=4.16 kva=500 %r=.55 XHT=1
~ wdg=2 bus=634 conn=Wye kv=0.48 kva=500 %r=.55 XLT=1

! ---------------------------------------------------------------------------
! 5) LINE CODES  (impedance / capacitance matrices — see IEEELineCodes.dss)
! ---------------------------------------------------------------------------
Redirect IEEELineCodes.dss

! ---------------------------------------------------------------------------
! 6) LINES
!    Bus phasing is written explicitly, e.g. Bus1=632.3.2 connects only
!    phases 3 and 2, which is how the feeder's unbalance is represented.
!    Length is in feet here (units=ft); LineCode matrices are per mile, and
!    OpenDSS reconciles the units automatically.
! ---------------------------------------------------------------------------
New Line.650632 Phases=3 Bus1=RG60.1.2.3 Bus2=632.1.2.3 LineCode=601 Length=2000 units=ft
New Line.632670 Phases=3 Bus1=632.1.2.3  Bus2=670.1.2.3 LineCode=601 Length=667  units=ft
New Line.670671 Phases=3 Bus1=670.1.2.3  Bus2=671.1.2.3 LineCode=601 Length=1333 units=ft
New Line.671680 Phases=3 Bus1=671.1.2.3  Bus2=680.1.2.3 LineCode=601 Length=1000 units=ft
New Line.632633 Phases=3 Bus1=632.1.2.3  Bus2=633.1.2.3 LineCode=602 Length=500  units=ft
New Line.632645 Phases=2 Bus1=632.3.2    Bus2=645.3.2   LineCode=603 Length=500  units=ft
New Line.645646 Phases=2 Bus1=645.3.2    Bus2=646.3.2   LineCode=603 Length=300  units=ft
New Line.692675 Phases=3 Bus1=692.1.2.3  Bus2=675.1.2.3 LineCode=606 Length=500  units=ft
New Line.671684 Phases=2 Bus1=671.1.3    Bus2=684.1.3   LineCode=604 Length=300  units=ft
New Line.684611 Phases=1 Bus1=684.3      Bus2=611.3     LineCode=605 Length=300  units=ft
New Line.684652 Phases=1 Bus1=684.1      Bus2=652.1     LineCode=607 Length=800  units=ft

! Closed switch between 671 and 692, modeled as a very short, near-zero-Z line.
New Line.671692 Phases=3 Bus1=671 Bus2=692 Switch=y r1=1e-4 r0=1e-4 x1=0 x0=0 c1=0 c0=0

! ---------------------------------------------------------------------------
! 7) SPOT LOADS
!    Conn = Wye or Delta.  Model =  1 (constant PQ), 2 (constant Z),
!    5 (constant I). kV is line-neutral for 1-phase wye, line-line otherwise.
! ---------------------------------------------------------------------------
New Load.671  Bus1=671.1.2.3 Phases=3 Conn=Delta Model=1 kV=4.16  kW=1155 kvar=660
New Load.634a Bus1=634.1     Phases=1 Conn=Wye   Model=1 kV=0.277 kW=160  kvar=110
New Load.634b Bus1=634.2     Phases=1 Conn=Wye   Model=1 kV=0.277 kW=120  kvar=90
New Load.634c Bus1=634.3     Phases=1 Conn=Wye   Model=1 kV=0.277 kW=120  kvar=90
New Load.645  Bus1=645.2     Phases=1 Conn=Wye   Model=1 kV=2.4   kW=170  kvar=125
New Load.646  Bus1=646.2.3   Phases=1 Conn=Delta Model=2 kV=4.16  kW=230  kvar=132
New Load.692  Bus1=692.3.1   Phases=1 Conn=Delta Model=5 kV=4.16  kW=170  kvar=151
New Load.675a Bus1=675.1     Phases=1 Conn=Wye   Model=1 kV=2.4   kW=485  kvar=190
New Load.675b Bus1=675.2     Phases=1 Conn=Wye   Model=1 kV=2.4   kW=68   kvar=60
New Load.675c Bus1=675.3     Phases=1 Conn=Wye   Model=1 kV=2.4   kW=290  kvar=212
New Load.611  Bus1=611.3     Phases=1 Conn=Wye   Model=5 kV=2.4   kW=170  kvar=80
New Load.652  Bus1=652.1     Phases=1 Conn=Wye   Model=2 kV=2.4   kW=128  kvar=86
New Load.670a Bus1=670.1     Phases=1 Conn=Wye   Model=1 kV=2.4   kW=17   kvar=10
New Load.670b Bus1=670.2     Phases=1 Conn=Wye   Model=1 kV=2.4   kW=66   kvar=38
New Load.670c Bus1=670.3     Phases=1 Conn=Wye   Model=1 kV=2.4   kW=117  kvar=68

! ---------------------------------------------------------------------------
! 8) SHUNT CAPACITORS
! ---------------------------------------------------------------------------
New Capacitor.Cap1 Bus1=675   phases=3 kVAR=600 kV=4.16
New Capacitor.Cap2 Bus1=611.3 phases=1 kVAR=100 kV=2.4

! ---------------------------------------------------------------------------
! 9) VOLTAGE BASES + SOLVE
!    Set all nominal L-L kV levels present in the model, calcv computes each
!    bus's base from connectivity, then Solve runs the (default snapshot)
!    power flow.
! ---------------------------------------------------------------------------
Set VoltageBases=[115, 4.16, 0.48]
CalcVoltageBases

Set Maxiterations=20      ! allow a few extra iterations for the regulator/cap controls
Solve

! ---------------------------------------------------------------------------
! 10) REPORTS  (uncomment as needed)
! ---------------------------------------------------------------------------
! Show Voltages LN Nodes
! Show Currents Elements
! Show Powers kVA Elements
! Show Taps
! Show Losses
